// COMSOL Multiphysics 5.6.0.280 model "104980541-Posarajah-COMSOL AssignmenRECTANGLE.mph"
// Outline of the model tree

Geometry
  geom1 "Geometry 1" (3D, length unit m)
    blk1: Block | size = {0.0431, 0.053, 0.019}
    fin: Finalize "Form Union"

Materials
  mat1: Common "High-strength alloy steel" on all domains
    def "Basic"
      relpermeability = 1
      heatcapacity = 475[J/(kg*K)]
      thermalconductivity = 17[W/(m*K)]
      electricconductivity = 4.032e6[S/m]
      relpermittivity = 1
      thermalexpansioncoefficient = 12.3e-6[1/K]
      density = 7850[kg/m^3]
    Enu "Young's modulus and Poisson's ratio"
      youngsmodulus = 200e9[Pa]
      poissonsratio = 0.30
    Murnaghan
      l = -3.0e11[Pa]
      m = -6.2e11[Pa]
      n = -7.2e11[Pa]
    Lame "Lamé parameters"
      lambLame = 1.15e11[Pa]
      muLame = 7.69e10[Pa]

Physics
  ht: HeatTransfer "Heat Transfer in Solids" on all domains
    dependent variable T
    solid1: SolidHeatTransferModel "Solid 1" (default) | k_mat = userdef; k = 17
    init1: init "Initial Values 1" (default) | Tinit = 973[degC]
    ins1: ThermalInsulation (default)
    hf1: HeatFluxBoundary "Heat Flux 1" on boundaries 2-6 | HeatFluxType = ConvectiveHeatFlux; h = 538; Text = 973[degC]
    temp1: TemperatureBoundary "Temperature 1" on boundaries 1 | T0 = 450[degC]

Mesh
  mesh1 "Mesh 1" (physics-controlled)

Studies
  std1 "Study 1"
    stat: Stationary

Solver configurations
  sol1 "Solution 1" (study std1)
    v1: Variables "Dependent Variables 1"
    s1: Stationary "Stationary Solver 1"
      fc1: FullyCoupled | linsolver = d1; initstep = 0.01; minstep = 1.0E-6; maxiter = 50
      d1: Direct "Direct, temperature (ht)" | linsolver = pardiso; pivotperturb = 1.0E-13

Datasets
  dset1: Solution | solution = sol1

Derived values
  av1: AvSurface "Surface Average 1" on boundaries 1
    data = dset1
    table = tbl2
    expr = ht.ndflux*(0.000513[m^2])
    unit = W
    descr = Q
  av2: AvSurface "Surface Average 2" on boundaries 1
    data = dset1
    table = tbl2
    expr = ht.ndflux
    unit = W/m^2
    descr = Normal conductive heat flux
  av3: AvSurface "Surface Average 3" on boundaries 6 | data = dset1; table = tbl2; expr = T

Tables
  tbl2: Table
    // Surface Average 2
    Normal conductive heat flux (W/m^2) | Q (W) | Temperature (K)
    571195 | 293.023 | 1200.37

Plots
  pg1: PlotGroup3D "Temperature (ht)" | data = dset1
    surf1: Surface | expr = T
  pg2: PlotGroup3D "Isothermal Contours (ht)" | data = dset1
    iso1: Isosurface | expr = T; levelrounding = off