// COMSOL Multiphysics 5.6.0.280 model "104980541-Posarajah-Assignment3.mph"
// Outline of the model tree

Geometry
  geom1 "Geometry 1" (2D, length unit m)
    r1: Rectangle | size = {.01, 0.0007}
    fin: Finalize "Form Union"

Materials
  mat1: Common "Transformer oil" on domains 1
    def "Basic"
      dynamicviscosity = 0.605
      heatcapacity = Cp(T)
      density = rho(T)
      thermalconductivity = .145
      ratioofspecificheat = 1
      eta: Piecewise
        arg = T
        pieces = 
          {243.0, 273.0, 4492.20229-64.7408879*T^1+0.349900959*T^2-8.40477E-4*T^3+7.57041667E-7*T^4}
          {273.0, 373.0, 91.4524999-1.33227058*T^1+0.00777680216*T^2-2.27271368E-5*T^3+3.32419673E-8*T^4-1.94631023E-11*T^5}
        argunit = K
        fununit = Pa*s
      Cp: Piecewise
        arg = T
        pieces = 
          {223.0, 293.0, -117056.38+1816.76208*T^1-10.305786*T^2+0.0256691919*T^3-2.36742424E-5*T^4}
          {293.0, 373.0, -13408.1491+123.044152*T^1-0.335401786*T^2+3.125E-4*T^3}
        argunit = K
        fununit = J/(kg*K)
      rho: Piecewise | arg = T; pieces = {223.0, 373.0, 1055.04607-0.581753034*T^1-6.40531689E-5*T^2}; argunit = K; fununit = kg/m^3
      k: Piecewise | arg = T; pieces = {223.0, 373.0, 0.134299084-8.04973822E-5*T^1}; argunit = K; fununit = W/(m*K)

Physics
  spf: LaminarFlow on all domains
    dependent variable u = {u, v, w}
    EquationForm.form = Automatic
    PhysicalModelProperty.Compressibility = Incompressible
    PhysicalModelProperty.IncludeGravity = 0
    AdvancedSettingProperty.UsePseudoTime = 1
    fp1: FluidProperties (default)
    init1: init "Initial Values 1" (default)
    wallbc1: WallBC "Wall 1" (default) | SlidingWall = 0
    wallbc2: WallBC "Wall 2" on boundaries 3
      BoundaryCondition = Slip
      utr = {12, 0, 0}
      TranslationalVelocityOption = Manual
    wallbc3: WallBC "Wall 3" on boundaries 2 | TranslationalVelocityOption = ZeroFixedWall
    inl1: InletBoundary "Inlet 1" on boundaries 1
      BoundaryCondition = Pressure
      multipleInlets = 0
      ComponentWise = VelocityFieldComponentWise
      SuppressBackflow = 0
      FullyDevelopedFlowOption = Uav
      Uavfdf = 0
    out1: OutletBoundary "Outlet 1" on boundaries 4
      BoundaryCondition = Pressure
      multipleInlets = 0
      NormalFlow = 1
      SuppressBackflow = 0
      PressureType = StaticPressure
      FullyDevelopedFlowOption = p0av
      Uavfdf = 0
  ht: HeatTransferInFluids on all domains
    dependent variable T
    ShapeProperty.order_temperature = 1
    PhysicalModelProperty.dz = 1[m]
    fluid1: FluidHeatTransferModel "Fluid 1" (default) | k_mat = userdef; k = 0.145; fluidType = gasLiquid
    init1: init "Initial Values 1" (default) | Tinit = 0[degC]
    ins1: ThermalInsulation (default)
    temp1: TemperatureBoundary "Temperature 1" on boundaries 3 | T0 = 40[degC]
    temp2: TemperatureBoundary "Temperature 2" on boundaries 2 | T0 = 15[degC]

Multiphysics
  nitf1: NonIsothermalFlow on all domains
    SpecifyTref = FromHeatTransferInterface
    Fluid_physics = spf
    Heat_physics = ht

Mesh
  mesh1 "Mesh 1" (physics-controlled)
    size: MeshSizeDefault | table = cfd; hauto = 6

Studies
  std1 "Study 1"
    stat: Stationary

Solver configurations
  sol1 "Solution 1" (study std1)
    v1: Variables "Dependent Variables 1"
    s1: Stationary "Stationary Solver 1"
      se1: Segregated | maxsegiter = 200; segstabacc = segcflcmp
        ss1: SegregatedStep "Velocity u, Pressure p" | segvar = {comp1_u, comp1_p}; linsolver = d1; subdamp = 0.5
        ss2: SegregatedStep "Temperature" | segvar = {comp1_T}; linsolver = d2; subdamp = 0.5
        ll1: LowerLimit | lowerlimit = comp1.T 0
      d1: Direct "Direct, fluid flow variables (spf)" | linsolver = pardiso; pivotperturb = 1.0E-13
      d2: Direct "Direct, temperature (ht)" | linsolver = pardiso; pivotperturb = 1.0E-13

Datasets
  dset1: Solution | solution = sol1

Derived values
  av2: AvSurface "Conductive Heat Flux" on domains 1
    data = dset1
    table = tbl6
    expr = ht.dfluxMag
    unit = W/m^2
    descr = Conductive heat flux magnitude
  av1: AvSurface "Surface Average 1" on domains 1
    data = dset1
    table = tbl6
    expr = ht.tfluxMag*(0.0007[m]*0.01[m])
    unit = W
    descr = Q
  max1: MaxSurface "Maximum Temperature" on domains 1 | data = dset1; table = tbl6; expr = T; descr = Max Temperature

Tables
  tbl1: Table
    // Surface Average 1
    ht.tfluxMag*(0.0007[m]*0.01[m]) (W)
    0.03625
  tbl2: Table
    // Maximum Temperature
    Max Temperature (K)
    313.15
  tbl4: Table
    // Line Average 3
    Normal conductive heat flux (W/m^2) | Normal conductive heat flux (W/m^2) | Normal conductive heat flux (W/m^2) | Normal conductive heat flux (W/m^2)
    14.9824 | 15.0324 | -5475.03 | 4893.51
  tbl5: Table
    // Line Average 3
    Normal conductive heat flux (W/m^2) | Normal conductive heat flux (W/m^2) | Normal conductive heat flux (W/m^2) | Normal conductive heat flux (W/m^2) | Normal conductive heat flux (W/m^2) | Normal conductive heat flux (W/m^2)
    -270.754 | -290.757 | 15.0074 | -4800.81 | 4294.4 | 4294.4
  tbl6: Table
    // Conductive Heat Flux
    Conductive heat flux magnitude (W/m^2) | Q (W) | Max Temperature (K)
    5178.57 | 0.03625 | 313.15

Plots
  pg1: PlotGroup2D "Velocity (spf)" | data = dset1
    surf1: Surface | expr = spf.U
  pg2: PlotGroup2D "Pressure (spf)" | data = dset1
    con1: Contour | expr = p; levelrounding = off
  pg3: PlotGroup2D "Temperature (ht)" | data = dset1
    surf1: Surface | expr = T
  pg4: PlotGroup2D "Isothermal Contours (ht)" | data = dset1
    con1: Contour | expr = T; levelrounding = off